OpenVSP model (file version 5), 17 components.
Geometry view with OpenVSP parameter names; values to 6 digits, angles in degrees, lengths in the model's unit.
Overall bounding box: X_Min=-0.29812 X_Len=1.66972 Y_Min=-0.9144 Y_Len=1.8288 Z_Min=-0.100584 Z_Len=0.377952

Fuselage "Fuselage"
  location (X Y Z) 0.127 0 0, rotation 0 0 0
  bounding box size 0.381 0.127 0.127
  Design: Length=0.381
  cross sections:
    n  XLocPercent  YLocPercent  ZLocPercent  shape
    0  0            0            0            rounded rectangle RoundRectXSec_Radius=0.0254 RoundedRect_Height=0.127 RoundedRect_Width=0.127
    1  1            0            0            as above

Fuselage "MainSpar", child of "Fuselage"
  location (X Y Z) 0.1016 0 0.0430696, rotation 0 0 0
  bounding box size 0.9144 0.0254 0.0254
  Design: Length=0.9144
  cross sections:
    n  XLocPercent  YLocPercent  ZLocPercent  shape
    0  0            0            0            circle Circle_Diameter=0.0254
    1  1            0            0            circle Circle_Diameter=0.01905

Fuselage "Nosecone", child of "Fuselage"
  location (X Y Z) -0.0004 0 0, rotation 0 0 0
  bounding box size 0.127 0.127 0.127
  Design: Length=0.127
  cross sections:
    n  XLocPercent  YLocPercent  ZLocPercent  shape
    0  0            0            0.25         point
    1  1            0            0            rounded rectangle RoundRectXSec_Radius=0.0254 RoundedRect_Height=0.127 RoundedRect_Width=0.127

Wing "Wing"
  location (X Y Z) 0.2032 0 0.0762, rotation 0 1.5 0
  symmetric about XZ
  bounding box size 0.228577 1.2192 0.030536
  totals: TotalSpan=1.2192 TotalProjectedSpan=1.2192 TotalChord=0.2286 TotalArea=0.278709 TotalAR=5.33333
  root: chord 0.2286, twist 0, NACA 4-series Camber=0.04 CamberLoc=0.4 ThickChord=0.12
  sections:
    n  Span    Root_Chord  Tip_Chord  Area      Sweep  Sweep_Location  Dihedral  Twist  Twist_Location  tip airfoil
    1  0.6096  0.2286      0.2286     0.139355  0      0               0         0      0.25            NACA 4-series Camber=0.04 CamberLoc=0.4 Theta=-1 ThickChord=0.12

Wing "VStab"
  location (X Y Z) 0.8509 0 0.0762, rotation 90 0 0
  symmetric about XZ
  bounding box size 0.127 0.0152469 0.164592
  totals: TotalSpan=0.329184 TotalProjectedSpan=0.329184 TotalChord=0.127 TotalArea=0.0418064 TotalAR=2.592
  root: chord 0.127, twist 0, NACA 4-series Camber=0 CamberLoc=0.2 ThickChord=0.12
  sections:
    n  Span      Root_Chord  Tip_Chord  Area       Sweep  Sweep_Location  Dihedral  Twist  Twist_Location  tip airfoil
    1  0.164592  0.127       0.127      0.0209032  0      0               0         0      0.25            as above

Wing "HStab"
  location (X Y Z) 0.8509 0 0.0254, rotation 0 -1.5 0
  symmetric about XZ
  bounding box size 0.126959 0.381 0.0154359
  totals: TotalSpan=0.381 TotalProjectedSpan=0.381 TotalChord=0.127 TotalArea=0.048387 TotalAR=3
  root: chord 0.127, twist 0, NACA 4-series Camber=0 CamberLoc=0.2 ThickChord=0.12
  sections:
    n  Span    Root_Chord  Tip_Chord  Area       Sweep  Sweep_Location  Dihedral  Twist  Twist_Location  tip airfoil
    1  0.1905  0.127       0.127      0.0241935  0      0               0         0      0.25            as above

Mesh "MeshGeom"
  location (X Y Z) 0 0 0, rotation 0 0 0
  triangle mesh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

Propeller "Main Propeller"
  location (X Y Z) -0.0254 0 0.0381, rotation 0 0 0
  bounding box size 0.0100272 0.203566 0.0197163
  Design: Diameter=0.2032 NumBlade=2 Beta34=20 UseBeta34Flag=1 Feather=0 Rotate=0 Precone=0 ReverseFlag=0 FoldAngle=0 PropMode=0 AF=152.355 CLi=0.540464 Chord=0.174474 Solidity=0.111073 ConstructXoC=0.5 FeatherAxisXoC=0.5 FeatherOffsetXoC=0
  cross sections:
    n  RadiusFrac  shape
    0  0.05        ellipse Ellipse_Height=0.004064 Ellipse_Width=0.008128
    1  0.4         NACA 16-series Chord=0.0184514 IdealCl=0.7 ThickChord=0.144074
    2  1           NACA 16-series Chord=0.013208 IdealCl=0.2 ThickChord=0.03
  Chord along r/R (cubic Bezier): 0.05: 0.08, 0.233333: 0.15, 0.416667: 0.2, 0.6: 0.2, 0.716667: 0.2, 0.833333: 0.2, 0.95: 0.2, 0.966667: 0.2, 0.983333: 0.2, 1: 0.13
  Twist along r/R (PCHIP): 0.05: 46.75, 0.75: 20, 1: 13
  Thick along r/R (cubic Bezier): 0.05: 0.5, 0.133333: 0.3, 0.216667: 0.225, 0.3: 0.2, 0.4: 0.125, 0.5: 0.115, 0.6: 0.1, 0.733333: 0.075, 0.866667: 0.055, 1: 0.03
  CLI along r/R (cubic Bezier): 0.05: 0, 0.166667: 0.7, 0.283333: 0.7, 0.4: 0.7, 0.466667: 0.7, 0.533333: 0.7, 0.6: 0.7, 0.733333: 0.7, 0.866667: 0.7, 1: 0.2

Fuselage "FrontLeftBoom"
  location (X Y Z) 0.261 -0.4572 0.06096, rotation -180 0 -180
  bounding box size 0.381 0.0254 0.0254
  Design: Length=0.381
  cross sections:
    n  XLocPercent  YLocPercent  ZLocPercent  shape
    0  0            0            0            circle Circle_Diameter=0.0254
    1  1            0            0            as above

Fuselage "FrontRightBoom", child of "FrontLeftBoom"
  location (X Y Z) 0.261 0.4572 0.06096, rotation -180 0 -180; relative location 0.261 0.4572 0.06096, rotation 0 180 0
  bounding box size 0.381 0.0254 0.0254
  Design: Length=0.381
  cross sections:
    n  XLocPercent  YLocPercent  ZLocPercent  shape
    0  0            0            0            circle Circle_Diameter=0.0254
    1  1            0            0            as above

Fuselage "BackRightBoom", child of "FrontRightBoom"
  location (X Y Z) 0.261 0.4572 0.06096, rotation 0 0 0
  bounding box size 0.381 0.0254 0.0254
  Design: Length=0.381
  cross sections:
    n  XLocPercent  YLocPercent  ZLocPercent  shape
    0  0            0            0            circle Circle_Diameter=0.0254
    1  1            0            0            as above

Fuselage "BackLeftBoom", child of "FrontLeftBoom"
  location (X Y Z) 0.260502 -0.4572 0.06096, rotation 0 0 0
  bounding box size 0.381 0.0254 0.0254
  Design: Length=0.381
  cross sections:
    n  XLocPercent  YLocPercent  ZLocPercent  shape
    0  0            0            0            circle Circle_Diameter=0.0254
    1  1            0            0            as above

Propeller "FrontLeftLiftRotor"
  location (X Y Z) -0.12 -0.4572 0.09144, rotation 0 90 0
  bounding box size 0.356241 0.0345036 0.0175475
  Design: Diameter=0.3556 NumBlade=2 Beta34=20 UseBeta34Flag=1 Feather=0 Rotate=90 Precone=0 ReverseFlag=0 FoldAngle=0 PropMode=0 AF=152.355 CLi=0.540464 Chord=0.174474 Solidity=0.111073 ConstructXoC=0.5 FeatherAxisXoC=0.5 FeatherOffsetXoC=0
  cross sections:
    n  RadiusFrac  shape
    0  0.05        ellipse Ellipse_Height=0.007112 Ellipse_Width=0.014224
    1  0.4         NACA 16-series Chord=0.0322899 IdealCl=0.7 ThickChord=0.144074
    2  1           NACA 16-series Chord=0.023114 IdealCl=0.2 ThickChord=0.03
  blade curves as in "Main Propeller"

Propeller "BackLeftLiftRotor", child of "FrontLeftLiftRotor"
  location (X Y Z) 0.642 -0.4572 0.09144, rotation 0 90 0
  bounding box size 0.356241 0.0345036 0.0175475
  Design: Diameter=0.3556 NumBlade=2 Beta34=20 UseBeta34Flag=1 Feather=0 Rotate=90 Precone=0 ReverseFlag=0 FoldAngle=0 PropMode=0 AF=152.355 CLi=0.540464 Chord=0.174474 Solidity=0.111073 ConstructXoC=0.5 FeatherAxisXoC=0.5 FeatherOffsetXoC=0
  cross sections:
    n  RadiusFrac  shape
    0  0.05        ellipse Ellipse_Height=0.007112 Ellipse_Width=0.014224
    1  0.4         NACA 16-series Chord=0.0322899 IdealCl=0.7 ThickChord=0.144074
    2  1           NACA 16-series Chord=0.023114 IdealCl=0.2 ThickChord=0.03
  blade curves as in "Main Propeller"

Propeller "FrontRightLiftRotor", child of "FrontLeftLiftRotor"
  location (X Y Z) -0.12 0.4572 0.09144, rotation 0 90 0
  bounding box size 0.356241 0.0345036 0.0175475
  Design: Diameter=0.3556 NumBlade=2 Beta34=20 UseBeta34Flag=1 Feather=0 Rotate=90 Precone=0 ReverseFlag=0 FoldAngle=0 PropMode=0 AF=152.355 CLi=0.540464 Chord=0.174474 Solidity=0.111073 ConstructXoC=0.5 FeatherAxisXoC=0.5 FeatherOffsetXoC=0
  cross sections:
    n  RadiusFrac  shape
    0  0.05        ellipse Ellipse_Height=0.007112 Ellipse_Width=0.014224
    1  0.4         NACA 16-series Chord=0.0322899 IdealCl=0.7 ThickChord=0.144074
    2  1           NACA 16-series Chord=0.023114 IdealCl=0.2 ThickChord=0.03
  blade curves as in "Main Propeller"

Propeller "BackRightLiftRotor", child of "FrontLeftLiftRotor"
  location (X Y Z) 0.642 0.4572 0.09144, rotation 0 90 0
  bounding box size 0.356241 0.0345036 0.0175475
  Design: Diameter=0.3556 NumBlade=2 Beta34=20 UseBeta34Flag=1 Feather=0 Rotate=90 Precone=0 ReverseFlag=0 FoldAngle=0 PropMode=0 AF=152.355 CLi=0.540464 Chord=0.174474 Solidity=0.111073 ConstructXoC=0.5 FeatherAxisXoC=0.5 FeatherOffsetXoC=0
  cross sections:
    n  RadiusFrac  shape
    0  0.05        ellipse Ellipse_Height=0.007112 Ellipse_Width=0.014224
    1  0.4         NACA 16-series Chord=0.0322899 IdealCl=0.7 ThickChord=0.144074
    2  1           NACA 16-series Chord=0.023114 IdealCl=0.2 ThickChord=0.03
  blade curves as in "Main Propeller"

Custom "Battery"
  location (X Y Z) 0.115824 0 -0.04, rotation 0 0 0
  bounding box size 0.155 0.048 0.033
  Design: Height=0.033 Length=0.155 SquareFlag=0 Width=0.048
  custom script Box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
